# OpenSim document version 40500
AnalyzeTool Elbow_model_load:
  model_file: C:/Users/bhuvi/Downloads/tendinopathy classification/osim models/Elbow_model_load_tuned_1H_nor_fast_right.osim
  replace_force_set: false
  results_directory: C:/Users/bhuvi/Downloads/tendinopathy classification/intermediate/1H_nor_fast_right
  output_precision: 8
  initial_time: 0
  final_time: 36.928
  solve_for_equilibrium_for_auxiliary_states: false
  maximum_number_of_integrator_steps: 20000
  maximum_integrator_step_size: 1
  minimum_integrator_step_size: 1e-8
  integrator_error_tolerance: 1e-5
  coordinates_file: C:/Users/bhuvi/Downloads/tendinopathy classification/intermediate/1H_nor_fast_right/1H_nor_fast_right_ik.mot
  lowpass_cutoff_frequency_for_coordinates: -1
  AnalysisSet Analyses:
    StaticOptimization: start_time=0 end_time=36.928 step_interval=1 in_degrees=true use_model_force_set=true
        activation_exponent=2 use_muscle_physiology=true optimizer_convergence_criterion=0.001
        optimizer_max_iterations=250
