# OpenSim document version 30000
Model Elbow_model:
  length_units: meters
  force_units: N
  gravity: 0 -9.80665 0
  credits:
    Rajagopal, A, Dembia, C.L., DeMers, M.S., Delp, D.D., Hicks, J.L., and Delp, S.L.
  publications:
    Rajagopal, Apoorva, et al. "Full-Body Musculoskeletal Model for Muscle-Driven Simulation of Human Gait." IEEE Transactions on Biomedical Engineering 63.10 (2016): 2068-2079. (2016)
  defaults:
    CoordinateActuator default: optimal_force=300
    Millard2012EquilibriumMuscle default: min_control=0.01 max_control=1 optimal_force=1 max_isometric_force=819
        optimal_fiber_length=0.0535 tendon_slack_length=0.078 pennation_angle_at_optimal=0 max_contraction_velocity=10
  BodySet:
    Body ground: mass=0 mass_center=(0 0 0) inertia_xx=0 inertia_yy=0 inertia_zz=0
    Body pelvis: mass=11.777 mass_center=(-0.0707 0 0) inertia_xx=0.1028 inertia_yy=0.0871 inertia_zz=0.0579
        meshes=(r_pelvis.vtp l_pelvis.vtp sacrum.vtp)
      CustomJoint ground_pelvis: parent_body=ground location_in_parent=(0 0 0) location=(0 0 0)
        Coordinate pelvis_tilt: motion_type=rotational default_value=0 range=(-1.570796 1.570796) clamped=true
            locked=true
        Coordinate pelvis_list: motion_type=rotational default_value=0 range=(-1.570796 1.570796) clamped=true
            locked=true
        Coordinate pelvis_rotation: motion_type=rotational default_value=0 range=(-1.570796 1.570796) clamped=true
            locked=true
        Coordinate pelvis_tx: motion_type=translational default_value=0 range=(-5 5) clamped=true locked=true
        Coordinate pelvis_ty: motion_type=translational default_value=0.94 range=(-1 2) clamped=true locked=true
        Coordinate pelvis_tz: motion_type=translational default_value=0 range=(-3 3) clamped=true locked=true
        SpatialTransform:
          TransformAxis rotation1: coordinates=pelvis_tilt axis=(0 0 1) LinearFunction(coefficients=1 0)
          TransformAxis rotation2: coordinates=pelvis_list axis=(1 0 0) LinearFunction(coefficients=1 0)
          TransformAxis rotation3: coordinates=pelvis_rotation axis=(0 1 0) LinearFunction(coefficients=1 0)
          TransformAxis translation1: coordinates=pelvis_tx axis=(1 0 0) LinearFunction(coefficients=1 0)
          TransformAxis translation2: coordinates=pelvis_ty axis=(0 1 0) LinearFunction(coefficients=1 0)
          TransformAxis translation3: coordinates=pelvis_tz axis=(0 0 1) LinearFunction(coefficients=1 0)
      WrapCylinder Gmax1_at_pelvis_r: xyz_body_rotation=(-0.6 0.45 0) translation=(-0.077 -0.099 0.061) quadrant=-x
          radius=0.04 length=0.15
      WrapCylinder Gmax2_at_pelvis_r: xyz_body_rotation=(-0.75 0.39 0) translation=(-0.08 -0.083 0.068) quadrant=all
          radius=0.04 length=0.1
      WrapCylinder Gmax3_at_pelvis_r: xyz_body_rotation=(-0.1 0 0) translation=(-0.083 -0.088 0.068) quadrant=all
          radius=0.04 length=0.1
      WrapCylinder Gmax1_at_pelvis_l: xyz_body_rotation=(0.6 -0.45 0) translation=(-0.077 -0.099 -0.061) quadrant=-x
          radius=0.04 length=0.15
      WrapCylinder Gmax2_at_pelvis_l: xyz_body_rotation=(0.75 -0.39 0) translation=(-0.08 -0.083 -0.068) quadrant=all
          radius=0.04 length=0.1
      WrapCylinder Gmax3_at_pelvis_l: xyz_body_rotation=(0.1 0 0) translation=(-0.083 -0.088 -0.068) quadrant=all
          radius=0.04 length=0.1
      WrapCylinder PS_at_brim_r: xyz_body_rotation=(-0.25 -0.27 0.1) translation=(-0.074 -0.06 0.0656) quadrant=-y
          radius=0.05 length=0.1
      WrapCylinder PS_at_brim_l: xyz_body_rotation=(0.25 0.27 0.1) translation=(-0.074 -0.06 -0.0656) quadrant=-y
          radius=0.05 length=0.1
      WrapCylinder IL_at_brim_r: xyz_body_rotation=(-0.32 -0.24 0.9) translation=(-0.071 -0.065 0.0756) quadrant=-y
          radius=0.0549 length=0.1
      WrapCylinder IL_at_brim_l: xyz_body_rotation=(0.32 0.24 0.9) translation=(-0.071 -0.065 -0.0756) quadrant=-y
          radius=0.0549 length=0.1
    Body torso: mass=26.8266 mass_center=(-0.03 0.32 0) inertia_xx=1.4745 inertia_yy=0.7555 inertia_zz=1.4314
        meshes=(hat_spine.vtp hat_jaw.vtp hat_skull.vtp hat_ribs_scap.vtp)
      CustomJoint back: parent_body=pelvis location_in_parent=(-0.1007 0.0815 0) location=(0 0 0)
        Coordinate lumbar_extension: motion_type=rotational default_value=0 range=(-1.570796 1.570796) clamped=true
            locked=true
        Coordinate lumbar_bending: motion_type=rotational default_value=0 range=(-1.570796 1.570796) clamped=true
            locked=true
        Coordinate lumbar_rotation: motion_type=rotational default_value=0 range=(-1.570796 1.570796) clamped=true
            locked=true
        SpatialTransform: axes_held_at_zero=(translation1 translation2 translation3)
          TransformAxis rotation1: coordinates=lumbar_extension axis=(0 0 1) LinearFunction(coefficients=1 0)
          TransformAxis rotation2: coordinates=lumbar_bending axis=(1 0 0) LinearFunction(coefficients=1 0)
          TransformAxis rotation3: coordinates=lumbar_rotation axis=(0 1 0) LinearFunction(coefficients=1 0)
    Body humerus_r: mass=2.0325 mass_center=(0 -0.164502 0) inertia_xx=0.011946 inertia_yy=0.004121 inertia_zz=0.013409
        meshes=humerus_rv.vtp
      CustomJoint acromial_r: parent_body=torso location_in_parent=(0.003155 0.3715 0.17) location=(0 0 0)
        Coordinate arm_flex_r: motion_type=rotational default_value=0 range=(-1.570796 1.570796) clamped=true
        Coordinate arm_add_r: motion_type=rotational default_value=0 range=(-2.094395 1.570796) clamped=true
        Coordinate arm_rot_r: motion_type=rotational default_value=0 range=(-1.570796 1.570796) clamped=true
        SpatialTransform: axes_held_at_zero=(translation1 translation2 translation3)
          TransformAxis rotation1: coordinates=arm_flex_r axis=(0 0 1) LinearFunction(coefficients=1 0)
          TransformAxis rotation2: coordinates=arm_add_r axis=(1 0 0) LinearFunction(coefficients=1 0)
          TransformAxis rotation3: coordinates=arm_rot_r axis=(0 1 0) LinearFunction(coefficients=1 0)
      WrapSphere deltoid_r: xyz_body_rotation=(-0.193033 -0.238063 -0.385718) translation=(0.0022 -0.0009 -0.0018)
          quadrant=all radius=0.0272
      WrapSphere inf_sup_sub_r: xyz_body_rotation=(-0.193033 -0.238063 -0.385718) translation=(-0.0017 0.0018 -0.0013)
          quadrant=all radius=0.0231
      WrapCylinder infra_cyl_r: xyz_body_rotation=(1.56643 0.00610865 -0.953124) translation=(0.0054 -0.023 -0.0044)
          quadrant=-x radius=0.014 length=0.12
      WrapCylinder ter_min_cyl_r: xyz_body_rotation=(1.56643 0.00610865 -1.47672) translation=(0.0054 -0.023 -0.0044)
          quadrant=-x radius=0.015 length=0.1
      WrapCylinder ter_lat_pec_r: xyz_body_rotation=(1.56643 0.00610865 -0.953124) translation=(0.0057 -0.073 -0.0042)
          quadrant=all radius=0.01 length=0.1
    Body ulna_r: mass=0.6075 mass_center=(0 -0.120525 0) inertia_xx=0.002962 inertia_yy=0.000618 inertia_zz=0.003213
        meshes=ulna_rv.vtp
      PinJoint elbow_r: parent_body=humerus_r location_in_parent=(0.013144 -0.286273 -0.009595)
          orientation_in_parent=(-0.02286271 0.2280177 0.005168901) location=(0 0 0)
          orientation=(-0.02286271 0.2280177 0.005168901)
        Coordinate elbow_flex_r: motion_type=rotational default_value=0 range=(0 2.618) clamped=true
      WrapCylinder elbow_r: xyz_body_rotation=(-3.21153 -0.03 2.79253) translation=(0 0.01 0) quadrant=y radius=0.019
          length=0.05
      WrapCylinder elbow_circ_r: xyz_body_rotation=(0.1 0 0) translation=(-0.02 0 0) quadrant=all radius=0.015
          length=0.05
    Body radius_r: mass=0.6075 mass_center=(0 -0.120525 0) inertia_xx=0.002962 inertia_yy=0.000618 inertia_zz=0.003213
        meshes=radius_rv.vtp
      PinJoint radioulnar_r: parent_body=ulna_r location_in_parent=(-0.006727 -0.013007 0.026083)
          orientation_in_parent=(-1.568841 0.05642797 1.536144) location=(0 0 0)
          orientation=(-1.568841 0.05642797 1.536144)
        Coordinate pro_sup_r: motion_type=rotational default_value=0 range=(0 1.570796) clamped=true
      WrapCylinder radius_ri: xyz_body_rotation=(-1.61286 -0.202284 1.77709) translation=(0.0035 -0.0322 -0.0003)
          quadrant=-x radius=0.0092 length=0.2
      WrapCylinder supinator_r: xyz_body_rotation=(1.48877 0.001 -1.3) translation=(0.0024 -0.1196 -0.0169) quadrant=-y
          radius=0.019 length=0.2
      WrapCylinder ulna_radius_r: xyz_body_rotation=(1.54095 0.256214 2.67035) translation=(0.0146 -0.0891 0.0003)
          quadrant=-x radius=0.0071 length=0.1
    Body hand_r: mass=0.4575 mass_center=(0 -0.068095 0) inertia_xx=0.000892 inertia_yy=0.000547 inertia_zz=0.00134
        meshes=(pisiform_rvs.vtp lunate_rvs.vtp scaphoid_rvs.vtp triquetrum_rvs.vtp hamate_rvs.vtp capitate_rvs.vtp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)
      UniversalJoint radius_hand_r: parent_body=radius_r location_in_parent=(-0.008797 -0.235841 0.01361)
          orientation_in_parent=(-1.570796 0 -1.570796) location=(0 0 0) orientation=(-1.570796 0 -1.570796)
        Coordinate wrist_flex_r: motion_type=rotational default_value=0 range=(-1.22173 1.22173) clamped=true
        Coordinate wrist_dev_r: motion_type=rotational default_value=0 range=(-0.4363323 0.6108652) clamped=true
      WrapCylinder flexors_r: xyz_body_rotation=(-0.28805 -0.232652 -1.57) translation=(-0.02 -0.01 -0.01) quadrant=y
          radius=0.017 length=0.05
      WrapCylinder extensors_r: xyz_body_rotation=(-0.28805 -0.232652 1.57) translation=(0.02 -0.01 -0.01) quadrant=y
          radius=0.017 length=0.05
    Body Dumbbell_r: mass=5 mass_center=(0.08 -0.05 0) inertia_xx=0.005 inertia_yy=0.0125 inertia_zz=0.014
        meshes=dumbbell.STL
      WeldJoint Load_joint_r: parent_body=hand_r location_in_parent=(0 -0.08 -0.063) location=(0 0 0)
    Body humerus_l: mass=2.0325 mass_center=(0 -0.164502 0) inertia_xx=0.011946 inertia_yy=0.004121 inertia_zz=0.013409
        meshes=humerus_lv.vtp
      CustomJoint acromial_l: parent_body=torso location_in_parent=(0.003155 0.3715 -0.17) location=(0 0 0)
        Coordinate arm_flex_l: motion_type=rotational default_value=0 range=(-1.570796 1.570796) clamped=true
            locked=true
        Coordinate arm_add_l: motion_type=rotational default_value=0 range=(-2.094395 1.570796) clamped=true
            locked=true
        Coordinate arm_rot_l: motion_type=rotational default_value=0 range=(-1.570796 1.570796) clamped=true
            locked=true
        SpatialTransform: axes_held_at_zero=(translation1 translation2 translation3)
          TransformAxis rotation1: coordinates=arm_flex_l axis=(0 0 1) LinearFunction(coefficients=1 0)
          TransformAxis rotation2: coordinates=arm_add_l axis=(-1 0 0) LinearFunction(coefficients=1 0)
          TransformAxis rotation3: coordinates=arm_rot_l axis=(0 -1 0) LinearFunction(coefficients=1 0)
      WrapSphere deltoid_l: xyz_body_rotation=(-0.193033 -0.238063 0.385718) translation=(0.0022 -0.0009 0.0018)
          quadrant=all radius=0.0272
      WrapSphere inf_sup_sub_l: xyz_body_rotation=(-0.193033 -0.238063 0.385718) translation=(-0.0017 0.0018 0.0013)
          quadrant=all radius=0.0231
      WrapCylinder infra_cyl_l: xyz_body_rotation=(1.56643 0.00610865 0.953124) translation=(0.0054 -0.023 0.0044)
          quadrant=-x radius=0.014 length=0.12
      WrapCylinder ter_min_cyl_l: xyz_body_rotation=(1.56643 0.00610865 1.47672) translation=(0.0054 -0.023 0.0044)
          quadrant=-x radius=0.015 length=0.1
      WrapCylinder ter_lat_pec_l: xyz_body_rotation=(1.56643 0.00610865 0.953124) translation=(0.0057 -0.073 0.0042)
          quadrant=all radius=0.01 length=0.1
    Body ulna_l: mass=0.6075 mass_center=(0 -0.120525 0) inertia_xx=0.002962 inertia_yy=0.000618 inertia_zz=0.003213
        meshes=ulna_lv.vtp
      PinJoint elbow_l: parent_body=humerus_l location_in_parent=(0.013144 -0.286273 0.009595)
          orientation_in_parent=(0.02286271 -0.2280177 0.005168901) location=(0 0 0)
          orientation=(0.02286271 -0.2280177 0.005168901)
        Coordinate elbow_flex_l: motion_type=rotational default_value=0 range=(0 2.618) clamped=true locked=true
      WrapCylinder elbow_l: xyz_body_rotation=(-3.21153 -0.03 2.79253) translation=(0 0.01 0) quadrant=y radius=0.019
          length=0.05
      WrapCylinder elbow_circ_l: xyz_body_rotation=(-0.1 0 0) translation=(-0.02 0 0) quadrant=all radius=0.015
          length=0.05
    Body radius_l: mass=0.6075 mass_center=(0 -0.120525 0) inertia_xx=0.002962 inertia_yy=0.000618 inertia_zz=0.003213
        meshes=radius_lv.vtp
      PinJoint radioulnar_l: parent_body=ulna_l location_in_parent=(-0.006727 -0.013007 -0.026083)
          orientation_in_parent=(1.568841 -0.05642797 1.536144) location=(0 0 0)
          orientation=(1.568841 -0.05642797 1.536144)
        Coordinate pro_sup_l: motion_type=rotational default_value=0 range=(0 1.570796) clamped=true locked=true
      WrapCylinder radius_le: xyz_body_rotation=(-1.61286 -0.202284 -1.77709) translation=(0.0035 -0.0322 0.0003)
          quadrant=-x radius=0.0092 length=0.2
      WrapCylinder supinator_l: xyz_body_rotation=(1.48877 0.00174533 0) translation=(-0.0034 -0.1196 -0.0069)
          quadrant=-y radius=0.009 length=0.2
      WrapCylinder ulna_radius_l: xyz_body_rotation=(1.54095 0.256214 -2.67035) translation=(0.0146 -0.0891 -0.0003)
          quadrant=-x radius=0.0071 length=0.1
    Body hand_l: mass=0.4575 mass_center=(0 -0.068095 0) inertia_xx=0.000892 inertia_yy=0.000547 inertia_zz=0.00134
        meshes=(pisiform_lvs.vtp lunate_lvs.vtp scaphoid_lvs.vtp triquetrum_lvs.vtp hamate_lvs.vtp capitate_lvs.vtp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)
      UniversalJoint radius_hand_l: parent_body=radius_l location_in_parent=(-0.008797 -0.235841 -0.01361)
          orientation_in_parent=(1.570796 0 1.570796) location=(0 0 0) orientation=(1.570796 0 1.570796)
        Coordinate wrist_flex_l: motion_type=rotational default_value=0 range=(-1.22173 1.22173) clamped=true
            locked=true
        Coordinate wrist_dev_l: motion_type=rotational default_value=0 range=(-0.4363323 0.6108652) clamped=true
            locked=true
      WrapCylinder flexors_l: xyz_body_rotation=(-0.28805 -0.232652 -1.57) translation=(-0.02 -0.01 0.01) quadrant=y
          radius=0.017 length=0.05
      WrapCylinder extensors_l: xyz_body_rotation=(-0.28805 -0.232652 1.57) translation=(0.02 -0.01 0.01) quadrant=y
          radius=0.017 length=0.05
    Body Dumbbell_l: mass=5 mass_center=(0.08 -0.05 0) inertia_xx=0.005 inertia_yy=0.0125 inertia_zz=0.014
        meshes=dumbbell.STL
      WeldJoint Load_joint_l: parent_body=hand_l location_in_parent=(0 -0.08 -0.045) location=(0 0 0)
  ForceSet:
    Millard2012EquilibriumMuscle [values shared by the 48 below unless stated]: max_isometric_force=938.7295
        optimal_fiber_length=0.1031 tendon_slack_length=0.03545029 pennation_angle_at_optimal=0.1147809
        ignore_tendon_compliance=true fiber_damping=0.01 default_activation=0.01 minimum_activation=0.01
      ActiveForceLengthCurve: min_norm_active_fiber_length=0.25 transition_norm_fiber_length=0.77
          max_norm_active_fiber_length=1.9 shallow_ascending_slope=0.75 minimum_value=0
      ForceVelocityCurve: concentric_slope_at_vmax=0 concentric_slope_near_vmax=0.25 isometric_slope=5
          eccentric_slope_at_vmax=0 eccentric_slope_near_vmax=0.15 max_eccentric_velocity_force_multiplier=1.4
      FiberForceLengthCurve: strain_at_zero_force=0 strain_at_one_norm_force=0.7
      TendonForceLengthCurve
    Millard2012EquilibriumMuscle biceplongus_r:
      PathPoint P1: torso (-0.00138069 0.380404 0.137379)
      PathPoint P2: humerus_r (0.00698075 0.0102952 0.0182713)
      PathPoint P3: radius_r (0.00128054 -0.0596545 0.00900105)
      PathWrap: wrap_object=inf_sup_sub_r method=hybrid
      PathWrap: wrap_object=radius_ri method=hybrid
    Millard2012EquilibriumMuscle biceplongus_l:
      PathPoint P1: torso (-0.00138069 0.380404 -0.137)
      PathPoint P2: humerus_l (0.00698075 0.01 -0.018)
      PathPoint P3: radius_l (0.00128054 -0.0596545 -0.009)
      PathWrap: wrap_object=inf_sup_sub_l method=hybrid
      PathWrap: wrap_object=radius_le method=hybrid
    Millard2012EquilibriumMuscle bicepbrevis_r:
      PathPoint P1: humerus_r (0.0230247 0.0132497 -0.0424548)
      PathPoint P2: radius_r (0.0014198 -0.0608746 0.00897058)
      PathWrap: wrap_object=radius_ri method=hybrid
    Millard2012EquilibriumMuscle bicepbrevis_l:
      PathPoint P1: humerus_l (0.0230249 0.0124317 0.0438361)
      PathPoint P2: radius_l (0.0014198 -0.0608746 0.00897058)
      PathWrap: wrap_object=radius_le method=hybrid
    Millard2012EquilibriumMuscle triceplong_1_r:
      PathPoint triceplong_1_r: humerus_r (-0.0222467 -0.0416597 -0.0293031)
      PathPoint triceplong_1_r: radius_r (-0.0134251 -0.0108673 -0.030488)
      PathWrap: wrap_object=elbow_r method=hybrid
    Millard2012EquilibriumMuscle triceplong_1_l:
      PathPoint triceplong_1_l: humerus_l (-0.0222467 -0.042 0.029)
      PathPoint triceplong_1_l: radius_l (-0.0134251 -0.0108673 0.03)
      PathWrap: wrap_object=elbow_l method=hybrid
    Millard2012EquilibriumMuscle triceplong_2_r:
      PathPoint triceplong_2_r: humerus_r (-0.00363319 -0.0244783 -0.0275114)
      PathPoint triceplong_2_r: radius_r (-0.0231872 0.00649391 -0.0224974)
      PathWrap: wrap_object=elbow_r method=hybrid
    Millard2012EquilibriumMuscle triceplong_2_l:
      PathPoint triceplong_2_l: humerus_l (-0.00363319 -0.0244783 0.028)
      PathPoint triceplong_2_l: radius_l (-0.0231872 0.00649391 0.022)
      PathWrap: wrap_object=elbow_l method=hybrid
    Millard2012EquilibriumMuscle triceplong_3_r:
      PathPoint triceplong_3_r: humerus_r (-0.0121764 -0.0291719 -0.0266743)
      PathPoint triceplong_3_r: radius_r (-0.0258767 -0.0205501 -0.0174161)
      PathWrap: wrap_object=elbow_r method=hybrid
    Millard2012EquilibriumMuscle triceplong_3_l:
      PathPoint triceplong_3_l: humerus_l (-0.0121764 -0.0291719 0.027)
      PathPoint triceplong_3_l: radius_l (-0.0258767 -0.0205501 0.017)
      PathWrap: wrap_object=elbow_l method=hybrid
    Millard2012EquilibriumMuscle triceplat_1_r:
      PathPoint triceplat_1_r: humerus_r (-0.00174724 -0.0413262 0.00265354)
      PathPoint triceplat_1_r: radius_r (-0.0208631 0.0184561 -0.0294943)
      PathWrap: wrap_object=elbow_r method=hybrid
    Millard2012EquilibriumMuscle triceplat_1_l:
      PathPoint triceplat_1_l: humerus_l (-0.00174724 -0.0413262 0.00265354)
      PathPoint triceplat_1_l: radius_l (-0.0208866 0.0152108 0.027091)
      PathWrap: wrap_object=elbow_l method=hybrid
    Millard2012EquilibriumMuscle triceplat_2_r:
      PathPoint triceplat_2_r: humerus_r (-0.00151175 -0.0413365 0.0023718)
      PathPoint triceplat_2_r: radius_r (-0.0214184 0.0116528 -0.0216298)
      PathWrap: wrap_object=elbow_r method=hybrid
    Millard2012EquilibriumMuscle triceplat_2_l:
      PathPoint triceplat_2_l: humerus_l (-0.00151175 -0.0413365 0.0023718)
      PathPoint triceplat_2_l: radius_l (-0.0212902 0.00952771 0.0252916)
      PathWrap: wrap_object=elbow_l method=hybrid
    Millard2012EquilibriumMuscle triceplat_3_r:
      PathPoint triceplat_3_r: humerus_r (0.00515553 -0.0812192 0.00701888)
      PathPoint triceplat_3_r: radius_r (-0.0219136 0.0119187 -0.0210877)
      PathWrap: wrap_object=elbow_r method=hybrid
    Millard2012EquilibriumMuscle triceplat_3_l:
      PathPoint triceplat_3_l: humerus_l (0.00515553 -0.0812192 0.00701888)
      PathPoint triceplat_3_l: radius_l (-0.0211252 0.0120001 0.0264907)
      PathWrap: wrap_object=elbow_l method=hybrid
    Millard2012EquilibriumMuscle tricepmed_1_r:
      PathPoint tricepmed_1_r: humerus_r (0.0027413 -0.164348 -0.00767013)
      PathPoint tricepmed_1_r: radius_r (-0.0219136 0.0119187 -0.0210877)
      PathWrap: wrap_object=elbow_r method=hybrid
    Millard2012EquilibriumMuscle tricepmed_1_l:
      PathPoint tricepmed_1_l: humerus_l (0.0027413 -0.164348 0.00767013)
      PathPoint tricepmed_1_: radius_l (-0.0219136 0.0119187 0.0210877)
      PathWrap: wrap_object=elbow_l method=hybrid
    Millard2012EquilibriumMuscle tricepmed_2_r:
      PathPoint tricepmed_2_r: humerus_r (-0.00326843 -0.143275 -0.00441714)
      PathPoint tricepmed_2_r: radius_r (-0.0219136 0.0119187 -0.0210877)
      PathWrap: wrap_object=elbow_r method=hybrid
    Millard2012EquilibriumMuscle tricepmed_2_l:
      PathPoint tricepmed_2_l: humerus_l (-0.00326843 -0.143275 0.00441714)
      PathPoint tricepmed_2_l: radius_l (-0.0219136 0.0119187 0.0210877)
      PathWrap: wrap_object=elbow_l method=hybrid
    Millard2012EquilibriumMuscle tricepmed_3_r:
      PathPoint tricepmed_3_r: humerus_r (-0.00386914 -0.200667 0.00411026)
      PathPoint tricepmed_3_r: radius_r (-0.0219136 0.0119187 -0.0210877)
      PathWrap: wrap_object=elbow_r method=hybrid
    Millard2012EquilibriumMuscle tricepmed_3_l:
      PathPoint tricepmed_3_l: humerus_l (-0.00386914 -0.200667 -0.00411026)
      PathPoint tricepmed_3_l: radius_l (-0.0219136 0.0119187 0.0210877)
      PathWrap: wrap_object=elbow_l method=hybrid
    Millard2012EquilibriumMuscle tricepmed_4_r:
      PathPoint tricepmed_4_r: humerus_r (-0.00531742 -0.21978 0.0081608)
      PathPoint tricepmed_4_r: radius_r (-0.0219136 0.0119187 -0.0210877)
      PathWrap: wrap_object=elbow_r method=hybrid
    Millard2012EquilibriumMuscle tricepmed_4_l:
      PathPoint tricepmed_4_l: humerus_l (-0.00531742 -0.21978 -0.0081608)
      PathPoint tricepmed_4_l: radius_l (-0.0219136 0.0119187 0.0210877)
      PathWrap: wrap_object=elbow_l method=hybrid
    Millard2012EquilibriumMuscle brachiorad_1_r:
      PathPoint P1: humerus_r (0.00244297 -0.211132 0.00549229)
      PathPoint P2: radius_r (-0.000313637 -0.225673 0.0330374)
    Millard2012EquilibriumMuscle brachiorad_1_l:
      PathPoint P1: humerus_l (0.00244297 -0.211132 -0.00549229)
      PathPoint P2: radius_l (-0.000313637 -0.225673 -0.0330374)
    Millard2012EquilibriumMuscle brachiorad_2_r:
      PathPoint P1: humerus_r (0.00115474 -0.235114 0.00480948)
      PathPoint P2: radius_r (-0.000447591 -0.226059 0.0332143)
    Millard2012EquilibriumMuscle brachiorad_2_l:
      PathPoint P1: humerus_l (0.00115474 -0.235114 -0.00480948)
      PathPoint P2: radius_l (-0.000447591 -0.226059 -0.0332143)
    Millard2012EquilibriumMuscle brachialis_1_r:
      PathPoint P1: humerus_r (0.00592859 -0.18288 0.00434321)
      PathPoint P2: radius_r (-0.0137347 -0.0471498 -0.0173007)
      PathWrap: wrap_object=elbow_circ_r method=hybrid
    Millard2012EquilibriumMuscle brachialis_1_l:
      PathPoint P1: humerus_l (0.00592859 -0.18288 -0.00434321)
      PathPoint P2: radius_l (-0.0137347 -0.0471498 0.0173007)
      PathWrap: wrap_object=elbow_circ_l method=hybrid
    Millard2012EquilibriumMuscle brachialis_2_r:
      PathPoint P1: humerus_r (0.00600945 -0.209163 -0.000798873)
      PathPoint P2: radius_r (-0.0156358 -0.0375337 -0.0219155)
      PathWrap: wrap_object=elbow_circ_r method=hybrid
    Millard2012EquilibriumMuscle brachialis_2_l:
      PathPoint P1: humerus_l (0.00600945 -0.209163 0.000798873)
      PathPoint P2: radius_l (-0.0156358 -0.0375337 0.0219155)
      PathWrap: wrap_object=elbow_circ_l method=hybrid
    Millard2012EquilibriumMuscle brachialis_3_r:
      PathPoint P1: humerus_r (0.00762384 -0.170602 -0.00289798)
      PathPoint P2: radius_r (-0.0185373 -0.0474407 -0.0220758)
      PathWrap: wrap_object=elbow_circ_r method=hybrid
    Millard2012EquilibriumMuscle brachialis_3_l:
      PathPoint P1: humerus_l (0.00762384 -0.170602 0.00289798)
      PathPoint P2: radius_l (-0.0185373 -0.0474407 0.0220758)
      PathWrap: wrap_object=elbow_circ_l method=hybrid
    Millard2012EquilibriumMuscle brachialis_4_r:
      PathPoint P1: humerus_r (0.000900958 -0.189225 -0.00744026)
      PathPoint P2: radius_r (-0.0166859 -0.0377914 -0.0253161)
      PathWrap: wrap_object=elbow_circ_r method=hybrid
    Millard2012EquilibriumMuscle brachialis_4_l:
      PathPoint P1: humerus_l (0.000900958 -0.189225 0.00744026)
      PathPoint P2: radius_l (-0.0166859 -0.0377914 0.0253161)
      PathWrap: wrap_object=elbow_circ_l method=hybrid
    Millard2012EquilibriumMuscle flex_carpi_rad_r:
      PathPoint P1: humerus_r (0.00777949 -0.280925 -0.0276782)
      PathPoint P2: hand_r (0.00037635 -0.0333041 0.00906915)
      PathWrap: wrap_object=flexors_r method=hybrid
    Millard2012EquilibriumMuscle flex_carpi_rad_l:
      PathPoint P1: humerus_l (0.00777949 -0.280925 0.0276782)
      PathPoint P2: hand_l (0.00037635 -0.0333041 -0.00906915)
      PathWrap: wrap_object=flexors_l method=hybrid
    Millard2012EquilibriumMuscle palmaris_longus_r:
      PathPoint P1: humerus_r (0.00990464 -0.280069 -0.0272057)
      PathPoint P2: hand_r (-0.00327482 -0.02683 -0.00417225)
      PathWrap: wrap_object=flexors_r method=hybrid range=(-1 0)
    Millard2012EquilibriumMuscle palmaris_longus_l:
      PathPoint P1: humerus_l (0.00990464 -0.280069 0.0272057)
      PathPoint P2: hand_l (-0.00327482 -0.02683 0.00417225)
      PathWrap: wrap_object=flexors_l method=hybrid
    Millard2012EquilibriumMuscle flex_carpi_ulna_r:
      PathPoint P1: humerus_r (0.00907494 -0.281261 -0.0281035)
      PathPoint P2: hand_r (-0.00114527 -0.0302942 -0.0213549)
      PathWrap: wrap_object=flexors_r method=hybrid
    Millard2012EquilibriumMuscle flex_carpi_ulna_l:
      PathPoint P1: humerus_l (0.00907494 -0.281261 0.0281035)
      PathPoint P2: hand_l (-0.00114527 -0.0302942 0.0213549)
      PathWrap: wrap_object=flexors_l method=hybrid
    Millard2012EquilibriumMuscle exten_carpi_ulna_r:
      PathPoint P1: humerus_r (0.000331661 -0.281332 0.011477)
      PathPoint P2: hand_r (-0.00754404 -0.0300882 -0.0205868)
      PathWrap: wrap_object=extensors_r method=hybrid
    Millard2012EquilibriumMuscle exten_carpi_ulna_l:
      PathPoint P1: humerus_l (0.000331661 -0.281332 -0.011477)
      PathPoint P2: hand_l (-0.00754404 -0.0300882 0.0205868)
      PathWrap: wrap_object=extensors_l method=hybrid
    Millard2012EquilibriumMuscle exten_carpi_rad_lon_r:
      PathPoint P1: humerus_r (0.00447771 -0.236146 0.00739969)
      PathPoint P2: hand_r (-0.00737819 -0.0299209 0.0116014)
      PathWrap: wrap_object=extensors_r method=hybrid
    Millard2012EquilibriumMuscle exten_carpi_rad_lon_l:
      PathPoint P1: humerus_l (0.00447771 -0.236146 -0.00739969)
      PathPoint P2: hand_l (-0.00737819 -0.0299209 -0.0116014)
      PathWrap: wrap_object=extensors_l method=hybrid
    Millard2012EquilibriumMuscle exten_carpi_rad_bre_r:
      PathPoint P1: humerus_r (0.0137518 -0.290403 0.0114144)
      PathPoint P2: hand_r (-0.0118116 -0.0279097 -0.00199035)
      PathWrap: wrap_object=extensors_r method=hybrid
    Millard2012EquilibriumMuscle exten_carpi_rad_bre_l:
      PathPoint P1: humerus_l (0.0137518 -0.290403 -0.0114144)
      PathPoint P2: hand_l (-0.0118116 -0.0279097 0.00199035)
      PathWrap: wrap_object=extensors_l method=hybrid
    CoordinateActuator lumbar_ext: coordinate=lumbar_extension optimal_force=10
    CoordinateActuator lumbar_bend: coordinate=lumbar_bending optimal_force=10
    CoordinateActuator lumbar_rot: coordinate=lumbar_rotation optimal_force=10
    CoordinateActuator shoulder_flex_r: coordinate=arm_flex_r optimal_force=10
    CoordinateActuator shoulder_add_r: coordinate=arm_add_r optimal_force=10
    CoordinateActuator shoulder_rot_r: coordinate=arm_rot_r optimal_force=10
    CoordinateActuator elbow_flex_r: coordinate=elbow_flex_r optimal_force=10
    CoordinateActuator pro_sup_r: coordinate=pro_sup_r optimal_force=10
    CoordinateActuator wrist_flex_r: coordinate=wrist_flex_r optimal_force=10
    CoordinateActuator wrist_dev_r: coordinate=wrist_dev_r optimal_force=10
    CoordinateActuator shoulder_flex_l: coordinate=arm_flex_l optimal_force=10
    CoordinateActuator shoulder_add_l: coordinate=arm_add_l optimal_force=10
    CoordinateActuator shoulder_rot_l: coordinate=arm_rot_l optimal_force=10
    CoordinateActuator elbow_flex_l: coordinate=elbow_flex_l optimal_force=10
    CoordinateActuator pro_sup_l: coordinate=pro_sup_l optimal_force=10
    CoordinateActuator wrist_flex_l: coordinate=wrist_flex_l optimal_force=10
    CoordinateActuator wrist_dev_l: coordinate=wrist_dev_l optimal_force=10
    ObjectGroup Biceps_right: members=(biceplongus_r bicepbrevis_r)
    ObjectGroup Biceps_left: members=(biceplongus_l bicepbrevis_l)
    ObjectGroup Triceps_longus_right: members=(triceplong_1_r triceplong_2_r triceplong_3_r)
    ObjectGroup Triceps_longus_left: members=(triceplong_1_l triceplong_2_l triceplong_3_l)
    ObjectGroup Triceps_lateralis_right: members=(triceplat_1_r triceplat_2_r triceplat_3_r)
    ObjectGroup Triceps_lateralis_left: members=(triceplat_1_l triceplat_2_l triceplat_3_l)
    ObjectGroup Triceps_medialis_right: members=(tricepmed_1_r tricepmed_2_r tricepmed_3_r tricepmed_4_r)
    ObjectGroup Triceps_medialis_left: members=(tricepmed_1_l tricepmed_2_l tricepmed_3_l tricepmed_4_l)
    ObjectGroup Brachialis_right: members=(brachialis_1_r brachialis_2_r brachialis_3_r brachialis_4_r)
    ObjectGroup Brachialis_left: members=(brachialis_1_l brachialis_2_l brachialis_3_l)
    ObjectGroup Brachioradialis_right: members=(brachiorad_1_r brachiorad_2_r)
    ObjectGroup Brachioradialis_left: members=(brachiorad_1_l brachiorad_2_l)
    ObjectGroup Wristflexors_right: members=(flex_carpi_ulna_r palmaris_longus_r flex_carpi_rad_r)
    ObjectGroup Wristflexors_left: members=(flex_carpi_ulna_l palmaris_longus_l flex_carpi_rad_l)
    ObjectGroup Wristextensors_right: members=(exten_carpi_rad_bre_r exten_carpi_rad_lon_r exten_carpi_ulna_r)
    ObjectGroup Wristextensors_left: members=(exten_carpi_rad_bre_l exten_carpi_rad_lon_l exten_carpi_ulna_l)
    ObjectGroup right_leg
    ObjectGroup left_leg
    ObjectGroup hip_add_r
    ObjectGroup hip_abd_r
    ObjectGroup hip_flex_r
    ObjectGroup hip_ext_r
    ObjectGroup hip_inrot_r
    ObjectGroup hip_exrot_r
    ObjectGroup knee_flex_r
    ObjectGroup knee_ext_r
    ObjectGroup ankle_df_r
    ObjectGroup ankle_pf_r
    ObjectGroup everter_r
    ObjectGroup inverter_r
    ObjectGroup hip_add_l
    ObjectGroup hip_abd_l
    ObjectGroup hip_flex_l
    ObjectGroup hip_ext_l
    ObjectGroup hip_exrot_l
    ObjectGroup hip_inrot_l
    ObjectGroup knee_flex_l
    ObjectGroup knee_ext_l
    ObjectGroup ankle_df_l
    ObjectGroup ankle_pf_l
    ObjectGroup everter_l
    ObjectGroup inverter_l
  MarkerSet:
    Marker r_should: torso (-0.0030641 0.414477 0.166965)
    Marker l_should: torso (-0.0030641 0.414477 -0.166965)
    Marker c7: torso (-0.085 0.435 0.001654)
    Marker clavicle: torso (0.040833 0.366008 0.000397911)
    Marker r_upa: humerus_r (0.03 -0.13 0.02)
    Marker r_elb_l: humerus_r (0.015 -0.28 0.04)
    Marker r_elb_m: humerus_r (0.00225 -0.286 -0.046)
    Marker r_low: ulna_r (-0.025359 -0.150993 0.044316)
    Marker r_wri_l: radius_r (0.0005 -0.225 0.05)
    Marker r_wri_m: radius_r (-0.022 -0.225 -0.022)
    Marker l_upa: humerus_l (0.03 -0.13 -0.02)
    Marker l_elb_l: humerus_l (0.015 -0.28 -0.04)
    Marker l_elb_m: humerus_l (0.00225005 -0.286 0.046)
    Marker l_low: ulna_l (-0.025359 -0.150993 -0.044316)
    Marker l_wri_l: radius_l (0.0005 -0.225 -0.05)
    Marker l_wri_m: radius_l (-0.022 -0.225 0.022)
    Marker r_met: hand_r (-0.020266 -0.0785914 -0.00305079)
    Marker l_met: hand_l (-0.020266 -0.0785914 -0.00305079)
